Wed Mar 22 21:54:23 EDT 2023
$PROBLEM From bbr: see 200.yaml for details

$INPUT C NUM ID TIME CMT EVID MDV DV AMT RATE DOSE LDOS SEX AGE WT EGFR BILI BLQ DAY TAD ADDL II NMTIME STUDY

$DATA ../../../../data/derived/study-001-002-003.csv
  IGNORE=@
  IGNORE=(BLQ.EQ.1)
  IGNORE=(TIME.LT.0)

$SUBROUTINE ADVAN4 TRANS4

$PK

; cap EGFR at 120
  GFRC = EGFR
  IF(EGFR.GT.120) GFRC = 120

  ; Patient vs healthy
  PAT=0
  IF(STUDY.EQ.3) PAT=1
  ; male vs female
  ISEX=0
  IF(SEX.EQ.2) ISEX=1

  WTCL = LOG(WT/70)*THETA(7)
  WTV = LOG(WT/70)*THETA(8)
  AGECL = LOG(AGE/40)*THETA(9)
  EGFRCL = LOG(GFRC/120)*THETA(10)
  PATCL = THETA(11)*PAT
  SEXCL = THETA(12)*ISEX

  MU_1 = THETA(1) + WTCL + AGECL + EGFRCL + PATCL + SEXCL
  CL = EXP(MU_1 + ETA(1))

  MU_2 = THETA(2) + WTV
  V2 = EXP(MU_2 + ETA(2))

  MU_3 = THETA(3)
  KA = EXP(MU_3 + ETA(3))

  MU_4 = THETA(4)
  D1 = EXP(MU_4 + ETA(4))

  MU_5 = THETA(5) + WTCL
  Q = EXP(MU_5 + ETA(5))

  MU_6 = THETA(6) + WTV
  V3 = EXP(MU_6 + ETA(6))

  S2 = V2

$ERROR
  IPRED = F
  Y = IPRED*(1 + EPS(1)) + EPS(2)

$THETA
  2        ; CL
  5        ; V2
  0.5      ; KA
  0.1      ; D1
  -1       ; Q
  4        ; V3

  0.75     ; WTCL
  1.00     ; WTV
  0.01     ; AGECL
  0.01     ; EGFRCL
  0.01     ; PATCL
  0.01     ; SEXCL

$OMEGA BLOCK(2)
  0.1      ; CL
  0.05 0.1 ; V2
$OMEGA
  0.1      ; KA
  0 FIX    ; D1
  0 FIX    ; Q
  0 FIX    ; V3

$SIGMA
  0.1      ; PROP
  10       ; ADD

$PRIOR NWPRI

$THETAP
  2   FIX     ; CL
  5   FIX     ; V2
  0.5 FIX     ; KA
  0.1 FIX     ; D1
  -1  FIX     ; Q
  4   FIX     ; V3

  0.75 FIX  ; WTCL
  1.00 FIX  ; WTV
  0.01 FIX  ; AGECL
  0.01 FIX  ; EGFRCL
  0.01 FIX  ; PATCL
  0.01 FIX  ; SEXCL

$THETAPV BLOCK(12) VALUES(4, 0) FIX

$OMEGAP BLOCK(2) FIX
  0.1      ; CL
  0.05 0.1 ; V2
$OMEGAP
  0.1 FIX  ; KA
  0 FIX    ; D1
  0 FIX    ; Q
  0 FIX    ; V3

$OMEGAPD (3 FIX) (1 FIX) (1 FIX) (1 FIX) (1 FIX)

$SIGMAP
  0.1 FIX     ; PROP
  10  FIX     ; ADD

$SIGMAPD (1 FIX) (1 FIX)

; CHAIN options:
;   CTYPE=0: initial estimates for THETA are sampled from a uniform
;     distribution between (1-IACCEPT)*THETA and (1+IACCEPT)*THETA)
;   CTYPE=2: initial estimates for THETA are from a normal distribution with
;     mean from the initial estimate in $THETA and variance from $THETAPV
;   DF=0: initial estimates for OMEGA come from Wishart distribution using
;     values in $OMEGA and degrees of freedom equal to dimensions of OMEGA
;   DFS=0: initial estimates for SIGMA come from Wishart distribution using
;     values in $SIGMA and degrees of freedom equal to dimensions of SIGMA
$EST METHOD=CHAIN FILE=../200.chn NSAMPLE=0 ISAMPLE=4 SEED=1 CTYPE=0 IACCEPT=0.3 DF=10 DFS=3
$EST METHOD=NUTS AUTO=2 SEED=4 NBURN=500 NITER=1000 PRINT=1 MSFO=./200.msf RANMETHOD=P PARAFPRINT=10000 BAYES_PHI_STORE=1

$TABLE NUM KA D1 CL V2 Q V3 ETAS(1:LAST) EPRED IPRED NPDE EWRES NOPRINT ONEHEADER FILE=200.tab RANMETHOD=P

NM-TRAN MESSAGES
 WARNINGS AND ERRORS (IF ANY) FOR PROBLEM    1
 (WARNING  2) NM-TRAN INFERS THAT THE DATA ARE POPULATION.
 (MU_WARNING 6) THETA(007): SHOULD BE ASSOCIATED WITH ONLY ONE MU_.
 (MU_WARNING 6) THETA(008): SHOULD BE ASSOCIATED WITH ONLY ONE MU_.
 (MU_WARNING 26) DATA ITEM(S) USED IN DEFINITION OF MU_(S) SHOULD BE CONSTANT FOR INDIV. REC.:
  WT AGE EGFR
 (WARNING  121) INTERACTION IS IMPLIED WITH EM/BAYES ESTIMATION METHODS
 LIM VALUES MAXLIM ASSESSED BY NMTRAN: 1,2,3,4,5,6,7,8,10,11,13,15,16

1NONLINEAR MIXED EFFECTS MODEL PROGRAM (NONMEM) VERSION 7.5.0
 ORIGINALLY DEVELOPED BY STUART BEAL, LEWIS SHEINER, AND ALISON BOECKMANN
 CURRENT DEVELOPERS ARE ROBERT BAUER, ICON DEVELOPMENT SOLUTIONS,
 AND ALISON BOECKMANN. IMPLEMENTATION, EFFICIENCY, AND STANDARDIZATION
 PERFORMED BY NOUS INFOSYSTEMS.
 PROBLEM NO.:         1
 From bbr: see 200.yaml for details
 TOT. NO. OF OBS RECS:     2572
 TOT. NO. OF INDIVIDUALS:      208
 TWO COMPARTMENT MODEL WITH FIRST-ORDER ABSORPTION (ADVAN4)
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 #TBLN:      1
 #METH: Chain Method Processing
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 #TBLN:      1
 #METH: NUTS Bayesian Analysis
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
 #TERM:
 BURN-IN WAS NOT TESTED FOR CONVERGENCE
 STATISTICAL PORTION WAS COMPLETED

 ETABAR IS THE ARITHMETIC MEAN OF THE ETA-ESTIMATES,
 AND THE P-VALUE IS GIVEN FOR THE NULL HYPOTHESIS THAT THE TRUE MEAN IS 0.

 ETABAR:        -1.0223E-02 -8.7616E-03  6.4463E-03  0.0000E+00  0.0000E+00  0.0000E+00
 SE:             2.0043E-02  2.2574E-02  5.5623E-02  0.0000E+00  0.0000E+00  0.0000E+00
 N:                     208         208         208           0           0           0

 P VAL.:         6.1001E-01  6.9792E-01  9.0774E-01  1.0000E+00  1.0000E+00  1.0000E+00

 ETASHRINKSD(%)  5.4920E+00  9.7674E+00  1.9888E+01  0.0000E+00  0.0000E+00  0.0000E+00
 ETASHRINKVR(%)  1.0682E+01  1.8581E+01  3.5821E+01  0.0000E+00  0.0000E+00  0.0000E+00
 EBVSHRINKSD(%)  2.7080E+00  8.9750E+00  1.9410E+01  0.0000E+00  0.0000E+00  0.0000E+00
 EBVSHRINKVR(%)  5.3427E+00  1.7145E+01  3.5052E+01  0.0000E+00  0.0000E+00  0.0000E+00
 RELATIVEINF(%)  0.0000E+00  0.0000E+00  0.0000E+00  0.0000E+00  0.0000E+00  0.0000E+00
 EPSSHRINKSD(%)  9.8600E+00  9.8600E+00
 EPSSHRINKVR(%)  1.8748E+01  1.8748E+01


 TOTAL DATA POINTS NORMALLY DISTRIBUTED (N):         2572
 N*LOG(2PI) CONSTANT TO OBJECTIVE FUNCTION:    4727.0198148048366
 OBJECTIVE FUNCTION VALUE WITHOUT CONSTANT:    23798.343067188584
 OBJECTIVE FUNCTION VALUE WITH CONSTANT:       28525.362881993420
 REPORTED OBJECTIVE FUNCTION DOES NOT CONTAIN CONSTANT

 TOTAL EFFECTIVE ETAS (NIND*NETA):                           624
 NIND*NETA*LOG(2PI) CONSTANT TO OBJECTIVE FUNCTION:    1146.8352894394316
 OBJECTIVE FUNCTION VALUE WITHOUT CONSTANT:    23798.343067188584
 OBJECTIVE FUNCTION VALUE WITH CONSTANT:       24945.178356628014
 REPORTED OBJECTIVE FUNCTION DOES NOT CONTAIN CONSTANT

 PRIOR CONSTANT TO OBJECTIVE FUNCTION:    59.655204959822711
 OBJECTIVE FUNCTION VALUE WITHOUT CONSTANT:    23798.343067188584
 OBJECTIVE FUNCTION VALUE WITH CONSTANT:       23857.998272148405
 REPORTED OBJECTIVE FUNCTION DOES NOT CONTAIN CONSTANT


 #TERE:
 Elapsed estimation  time in seconds:  9787.68
 Elapsed covariance  time in seconds:     0.00

 ********************                              NUTS BAYESIAN ANALYSIS                            ********************
 #OBJT:**************                       AVERAGE VALUE OF LIKELIHOOD FUNCTION                     ********************
 #OBJV:********************************************    23798.343       **************************************************
 #OBJS:********************************************       56.689 (STD) **************************************************

 ********************                              NUTS BAYESIAN ANALYSIS                            ********************
 ********************                             FINAL PARAMETER ESTIMATE                           ********************

 THETA - VECTOR OF FIXED EFFECTS PARAMETERS   *********
         TH 1      TH 2      TH 3      TH 4      TH 5      TH 6      TH 7      TH 8      TH 9      TH10      TH11      TH12
         2.01E+00  5.26E+00  4.62E-01  2.40E-01 -5.97E-01  4.26E+00  7.41E-01  1.07E+00 -4.23E-02  4.16E-01 -2.30E-01  9.33E-02

 OMEGA - COV MATRIX FOR RANDOM EFFECTS - ETAS  ********
         ETA1      ETA2      ETA3      ETA4      ETA5      ETA6
 ETA1
+        9.40E-02
 ETA2
+        7.73E-02  1.31E-01
 ETA3
+        0.00E+00  0.00E+00  1.01E+00
 ETA4
+        0.00E+00  0.00E+00  0.00E+00  0.00E+00
 ETA5
+        0.00E+00  0.00E+00  0.00E+00  0.00E+00  0.00E+00
 ETA6
+        0.00E+00  0.00E+00  0.00E+00  0.00E+00  0.00E+00  0.00E+00

 SIGMA - COV MATRIX FOR RANDOM EFFECTS - EPSILONS  ****
         EPS1      EPS2
 EPS1
+        4.43E-02
 EPS2
+        0.00E+00  1.33E+00

 OMEGA - CORR MATRIX FOR RANDOM EFFECTS - ETAS  *******
         ETA1      ETA2      ETA3      ETA4      ETA5      ETA6
 ETA1
+        3.06E-01
 ETA2
+        6.97E-01  3.61E-01
 ETA3
+        0.00E+00  0.00E+00  1.00E+00
 ETA4
+        0.00E+00  0.00E+00  0.00E+00  0.00E+00
 ETA5
+        0.00E+00  0.00E+00  0.00E+00  0.00E+00  0.00E+00
 ETA6
+        0.00E+00  0.00E+00  0.00E+00  0.00E+00  0.00E+00  0.00E+00

 SIGMA - CORR MATRIX FOR RANDOM EFFECTS - EPSILONS  ***
         EPS1      EPS2
 EPS1
+        2.11E-01
 EPS2
+        0.00E+00  1.15E+00

 ********************                              NUTS BAYESIAN ANALYSIS                            ********************
 ********************                STANDARD ERROR OF ESTIMATE (From Sample Variance)               ********************

 THETA - VECTOR OF FIXED EFFECTS PARAMETERS   *********
         TH 1      TH 2      TH 3      TH 4      TH 5      TH 6      TH 7      TH 8      TH 9      TH10      TH11      TH12
         4.81E-02  3.19E-02  1.22E-01  5.11E-02  8.15E-02  2.76E-01  1.05E-01  1.20E-01  6.20E-02  1.58E-01  3.92E-02  3.86E-02

 OMEGA - COV MATRIX FOR RANDOM EFFECTS - ETAS  ********
         ETA1      ETA2      ETA3      ETA4      ETA5      ETA6
 ETA1
+        1.02E-02
 ETA2
+        1.08E-02  1.61E-02
 ETA3
+        0.00E+00  0.00E+00  1.60E-01
 ETA4
+        0.00E+00  0.00E+00  0.00E+00  0.00E+00
 ETA5
+        0.00E+00  0.00E+00  0.00E+00  0.00E+00  0.00E+00
 ETA6
+        0.00E+00  0.00E+00  0.00E+00  0.00E+00  0.00E+00  0.00E+00

 SIGMA - COV MATRIX FOR RANDOM EFFECTS - EPSILONS  ****
         EPS1      EPS2
 EPS1
+        1.46E-03
 EPS2
+        0.00E+00  2.70E-01

 OMEGA - CORR MATRIX FOR RANDOM EFFECTS - ETAS  *******
         ETA1      ETA2      ETA3      ETA4      ETA5      ETA6
 ETA1
+        1.65E-02
 ETA2
+        4.37E-02  2.22E-02
 ETA3
+        0.00E+00  0.00E+00  7.87E-02
 ETA4
+        0.00E+00  0.00E+00  0.00E+00  0.00E+00
 ETA5
+        0.00E+00  0.00E+00  0.00E+00  0.00E+00  0.00E+00
 ETA6
+        0.00E+00  0.00E+00  0.00E+00  0.00E+00  0.00E+00  0.00E+00

 SIGMA - CORR MATRIX FOR RANDOM EFFECTS - EPSILONS  ***
         EPS1      EPS2
 EPS1
+        3.47E-03
 EPS2
+        0.00E+00  1.16E-01
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 Elapsed postprocess time in seconds:     2.53
 Elapsed finaloutput time in seconds:     0.20
 #CPUT: Total CPU Time in Seconds,    24221.994
